// COMSOL Multiphysics 5.4.0.346 model "starved-sediment center (concave trench).mph"
// Outline of the model tree

Parameters
  dd = 10
  c = 0

Functions
  step1: Step "Depth of overcoming bending moment" | location = -250; smooth = 2
  step2: Step "Winkler foundation thickness" | location = -10; to = 800*9.8*10; smooth = 0.01
  step9: Step "Winkler foundation thickness 1" | location = -6; to = 800*9.8*6; smooth = 0.01
  step3: Step "Viscosity jump at lower mantle" | location = -660; from = 100
  int1: Interpolation "Half space cooling model (initial temperature condition)" | importedname = initial temperature.txt; source = file; filename = /home/kjy11/initial T, difusivitiy 1e-6, 3500 km, 273K-1623K.txt; nargs = 2; argunit = m,m; fununit = K
  int2: Interpolation "Mantle geotherm (upper plane)"
    table = 
      {0, 273}
      {-7.07070707071, 378.575916288591}
      {-14.1414141414141, 483.360570120645}
      {-21.2121212121212, 586.580445474424}
      {-28.2828282828283, 687.496857490888}
      {-35.3535353535354, 785.421748243820}
      {-42.4242424242424, 879.731632912290}
      {-49.4949494949495, 969.879230066726}
      {-56.5656565656566, 1055.40242569952}
      {-63.6363636363636, 1135.93035068260}
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    argunit = km
    fununit = K
  int3: Interpolation "Mantle geotherm (lower plane)"
    table = 
      {-80, 1301.78359938719}
      {-86.2626262626263, 1357.43218839499}
      {-92.5252525252525, 1408.73547730971}
      {-98.7878787878788, 1455.75441840937}
      {-105.050505050505, 1498.59319578589}
      {-111.313131313131, 1537.39374536916}
      {-117.575757575758, 1572.32991382416}
      {-123.838383838384, 1603.60145281676}
      {-130.101010101010, 1631.42803218908}
      {-136.363636363636, 1656.04343672492}
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    argunit = km
    fununit = K
  step6: Step "time of grivity initiation" | location = 6e12; smooth = 1e12
  step7: Step "time of bending moment initiation 1" | location = 6e12; smooth = 1e12
  step8: Step "along strike" | location = 500; smooth = 1000
  gp1: GaussianPulse | location = 500
  int4: Interpolation | table = {{0, 0.8}, {700, 0.8}, {800, 1}, {1200, 1}, {1300, 0.8}, {2000, 0.8}}; argunit = km
  rect1: Rectangle | lower = 800e3; upper = 1200e3; smooth = 1000
  rect2: Rectangle (disabled) | lower = 800e3; upper = 1200e3; smooth = 1000

Variables
  var1 "Variables 1"
    char_stra = 1e-15[1/s]
    dd = 1e8
    n = 3.5
    R = R_const[mol*K/J]
    pp = 80[kg/m^3]*g_const*-z
    P = (solid.sx+solid.sy+solid.sz)/3
    p = 3300[kg/m^3]*g_const*-z[1/Pa]
    ds11 = abs(solid.sx-pp)+dd
    ds12 = abs(solid.sxy)+dd
    ds13 = abs(solid.sxz)+dd
    ds21 = abs(solid.sxy)+dd
    ds22 = abs(solid.sy-pp)+dd
    ds23 = abs(solid.syz)+dd
    ds31 = abs(solid.sxz)+dd
    ds32 = abs(solid.syz)+dd
    ds33 = abs(solid.sz-pp)+dd
    A_dis = 2.42*(10)^(-16)
    A_dif = 1.92*(10)^(-10)
    E_dis = 540e3
    E_dif = 300e3
    v_dif = 4.5e-6
    v_dis = 14e-6
    I2S = sqrt(1/2*((ds11)^2+(ds12)^2+(ds13)^2+(ds21)^2+(ds22)^2+(ds23)^2+(ds31)^2+(ds32)^2+(ds33)^2))[m^2/N]
    mub = ((10e6[Pa]+3300[kg/m^3]*g_const*(-z*0.6))/2/char_stra)[1/Pa/s]
    mu_dif = (1/2/A_dif)*exp((E_dif+p*v_dif)/R/T[1/K])
    e_dis = (A_dis)*((I2S)^(n))*exp(-(E_dis+p*v_dis)/R/T[1/K])
    mu_dis = I2S/e_dis/2
    mu = max(1e19,min(mub,min(mu_dif,mu_dis)))
    mu2 = min(mub,mu_dif)
    mu_dis2 = 1/(A_dis)*((I2S)^(1-n))*exp(E_dis/R/(T[1/K]))
    ex = solid.Ldx+d
    exy = solid.Ldxy+d
    exz = solid.Ldxz+d
    eyz = solid.Ldyz+d
    ez = solid.Ldz+d
    ey = solid.Ldy+d
    d = 1e-17[1/s]
    I2e = sqrt(1/2*((ex)^2+(exy)^2+(exy)^2+(ey)^2+(eyz)^2+(eyz)^2+(ez)^2+(exz)^2+(exz)^2))
    mumu = (mub*mu_dif + mub*mu_dis * mu_dif * mu_dis)/(mub*mu_dif*mu_dis)

Probes
  dom1: Domain "Domain Probe 1" (disabled) on all domains
    type = integral
    expr = solid.Ws
    unit = J
    descr = Elastic strain energy density

Geometry
  geom1 "Geometry 1" (3D, length unit km)
    blk1: Block | pos = {0, 0, -80}; size = {3500, 2000, 80}
    fin: Finalize "Form Union"

Physics
  solid: SolidMechanics on all domains
    dependent variable u = {u, v, w}
    ShapeProperty.order_displacement = 1
    StructuralTransientBehavior.StructuralTransientBehavior = Quasistatic
    lemm1: LinearElasticModel "Linear Elastic Material 1" (default)
      E_mat = userdef
      E = 2e11/100
      nu_mat = userdef
      nu = 0.3
      rho_mat = userdef
      rho = 1+80*(1-3e-5*(T[1/K]-273))*(z<=-85[km])[kg/m^3]+50*(z<-50[km])*(z>-150[km])*(Z>-10[km])*0
      vis1: Viscoelasticity on all domains
        MaterialModel = SLS
        RelaxationParameter = Elastoviscosity
        etav = mu*0.1[Pa*s]
        Gv = 7.6923e10
      vis2: Viscoelasticity (disabled) on all domains
        MaterialModel = SLS
        RelaxationParameter = Elastoviscosity
        etav = 1e23
        Gv = 7.6923e10
    free1: Free (default)
    init1: init "Initial Values 1" (default)
    gr1: Gravity on domains 1 | g = {0, 0, -g_const*step6(t[1/s])}
    bndl1: BoundaryLoad "Force for Overcoming bending moment" on boundaries 1
      FperArea = {0, 0, -10^(9.5)*step1(z[1/km])*step6(t[1/s])/10*(t[1/s]<5e13)}
    spf1: SpringFoundation2 "Winkler foundation" (disabled) on boundaries 4
      kPerArea = diag{0, 0, (step2(w[1/km])-step9(w[1/km]))/2000*y[1/km]+step9(w[1/km])}
      kTot = diag{0, 0, 5e5/2*step2(z[1/km])}
    disp1: Displacement2 "Prescribed Displacement 1" on boundaries 6 | Direction = {0, 1, 1}
    disp2: Displacement2 "Prescribed Displacement 2" on boundaries 2, 5 | Direction = {0, 1, 0}
    spf2: SpringFoundation2 "Mantle visosity" on boundaries 1-5
      FDefPerVolume = {0[N/m^4]*solid.uspring1_spf1, 0[N/m^4]*solid.uspring2_spf1, 0[N/m^4]*solid.uspring3_spf1}
      FDefPerArea = {0[N/m^3]*solid.uspring1_spf1, 0[N/m^3]*solid.uspring2_spf1, 0[N/m^3]*solid.uspring3_spf1}
      FDefPerLine = {0[N/m^2]*solid.uspring1_spf1, 0[N/m^2]*solid.uspring2_spf1, 0[N/m^2]*solid.uspring3_spf1}
      FDefTot = {0[N/m]*solid.uspring1_spf1, 0[N/m]*solid.uspring2_spf1, 0[N/m]*solid.uspring3_spf1}
      FDef = {0[N/m]*solid.uspring1_spf1, 0[N/m]*solid.uspring2_spf1, 0[N/m]*solid.uspring3_spf1}
      DampPerArea = 1e22/(1e6)*1.5*step3(z[1/km])
      DampTot = 1e25*step3(z[1/km])
    spf3: SpringFoundation2 "Winkler foundation 1" on boundaries 4
      kPerArea = diag{0, 0, (z>=9e3*rect1(y[1/m])-9e3-1e3)*9.8*800}
      kTot = diag{0, 0, 5e5/2*step2(z[1/km])}
      FDefPerVolume = {0[N/m^4]*solid.uspring1_spf1, 0[N/m^4]*solid.uspring2_spf1, 0[N/m^4]*solid.uspring3_spf1}
      FDefPerArea = {0[N/m^3]*solid.uspring1_spf1, 0[N/m^3]*solid.uspring2_spf1, 0[N/m^3]*solid.uspring3_spf1}
      FDefPerLine = {0[N/m^2]*solid.uspring1_spf1, 0[N/m^2]*solid.uspring2_spf1, 0[N/m^2]*solid.uspring3_spf1}
      FDefTot = {0[N/m]*solid.uspring1_spf1, 0[N/m]*solid.uspring2_spf1, 0[N/m]*solid.uspring3_spf1}
      FDef = {0[N/m]*solid.uspring1_spf1, 0[N/m]*solid.uspring2_spf1, 0[N/m]*solid.uspring3_spf1}
  ht: HeatTransfer "Heat Transfer in Solids" on all domains
    dependent variable T
    ShapeProperty.order_temperature = 1
    solid1: SolidHeatTransferModel "Solid 1" (default)
      k_mat = userdef
      k = 4
      rho_mat = userdef
      rho = 3300
      Cp_mat = userdef
      Cp = 1250
    init1: init "Half space cooling model" (default) | Tinit = int1(x,z)
    ins1: ThermalInsulation (default)
    temp1: TemperatureBoundary "Mantle geotherm (upper plane)" on boundaries 4 | T0 = int2(z)
    temp2: TemperatureBoundary "Mantle geotherm (lower plane)" on boundaries 3 | T0 = int3(z)

Mesh
  mesh1 "Mesh 1"
    size: MeshSizeDefault | hauto = 1
    map1: Map "Mapped 1" on boundaries 1-6
      dis1: Distribution on edges 1, 6, 9, 12 | numelem = 10
      dis2: Distribution on edges 3, 5, 7, 8 | numelem = 50
      dis3: Distribution on edges 2, 4, 10, 11
        type = predefined
        reverse = on
        elemcount = 50
        elemratio = 5
        symmetric = on
    swe2: Sweep "Swept 2" on remaining entities | sourceface = boundaries 4; targetface = boundaries 3

Studies
  std1 "Study 1"
    time: Transient "Time Dependent"
      tlist = range(0,2E15/50,2.8e14*2)
      usertol = on
      geometricNonlinearity = on
      useinitsol = on
      usesol = on

Solver configurations
  sol1 "Solution 1" (study std1)
    v1: Variables "Dependent Variables 1"
      comp1_u: Field "Displacement field (comp1.u)" | scalemethod = manual; scaleval = 1e-2*4031922.6183050685
    t1: Time "Time-Dependent Solver 1"
      tlist = range(0,2E15/50,2.8e14*2)
      atolmethod = {comp1_solid_lemm1_vis1_ev, global, comp1_T, global, comp1_u, global}
      atolvaluemethod = {comp1_solid_lemm1_vis1_ev, factor, comp1_T, factor, comp1_u, factor}
      atol = {comp1_solid_lemm1_vis1_ev, 1e-3, comp1_T, 1e-3, comp1_u, 1e-3}
      maxorder = 2
      estrat = exclude
      dDef: Direct
      fc1: FullyCoupled | dtech = auto; minstep = 0.1; maxiter = 8